! Model of the Periodic Structure
! =============================================================================
! To calcluate the effective properties of the periodic structure, we need to
!   - set the origin point at the center of the unit cell
!   - set the density of the diaphragm as half of the steel
! SI units: kg, m, s, N, Pa
! All the parmeters with __XXX_STR__ or __XXX_VAL__ will be substitutted in
! the main python program.
! CAUTION: Avoid the space in the APDL commands. It may cause error.
! =============================================================================
! 1. Basic Settings
FINISH
/CLEAR
! /FILNAME,__JobName_STR__,1
/FILNAME,test,1

! 1.1 Setting the fonts of the graphic window (Legend, Entity, Annotations)
! /DEV,FONT,LEGEND,MENU
/DEVICE,FONT,1,BITSTREAM*CHARTER,MEDIUM,R,32,,,,,
! /DEV,FONT,ENTITY,MENU
/DEVICE,FONT,2,BITSTREAM*CHARTER,MEDIUM,R,16,,,,,
! /DEV,FONT,ANNO  ,MENU
/DEVICE,FONT,3,BITSTREAM*CHARTER,MEDIUM,R,32,,,,,

! 1.2 Change the background color from black to white
/RGB,INDEX,100,100,100,0
/RGB,INDEX,80,80,80,13
/RGB,INDEX,60,60,60,14
/RGB,INDEX,0,0,0,15
/REPLOT
/PREP7

! =============================================================================
! 2. Create the preliminary model, including:
!   - Parmater Defining:
!       - materials
!       - sections
!       - element types
!   - nodes
!       - nodes for the truss
!       - node for the cross-secion center (master node of RBE3)
!   - Elements
!       - Legs
!       - RBE3 (bundle a mass21 element with 0 mass)
! =============================================================================
! 2.1 Define the parameters
! 2.1.1 Element types
ET,1,BEAM188        ! Leg members & Diaphragm members
ET,2,LINK180        ! Brace memebers
ET,3,MASS21         ! Bundle to master node for the RBE3

! Backup commands (in case of using beam4)
! ET,1,BEAM4          ! Leg members & Diaphragm members

! 2.1.2 Materials
! Material for legs and braces
UIMP,1,EX,PRXY,DENS,2.06E11,0.31,7850
MP,ALPX,1,0.000012

! Material for diaphragms
UIMP,2,EX,PRXY,DENS,2.06E11,0.31,7850/2.0
MP,ALPX,1,0.000012

! 2.1.3 Sections
!   The section data is now hard coding here. IN the future it can be set to
!   be python parameters, such as __LegSection_L1_VAL__
SECTYPE,1,BEAM,L                            ! Leg section
SECDATA,0.16,0.16,0.014,0.014               ! L1, L2, T1, T2

SECTYPE,2,BEAM,L                            ! Diaphragm section
SECDATA,0.08,0.08,0.006,0.006

R,3,7.412E-4                                ! Brace section
R,4,1E-12,1E-12,1E-12                       ! Mass Elements

! 2.2 Create Nodes
! 2.2.1 Setting the basic geometry parameters
!   A truss with 3 sections formed by 5 subsections: |xxxxx|xxxxx|xxxxx|
!   - NUM_SECTIONS: number of sections (period cell)
!   - NUM_SUB_SECTIONS: numebr of subsections between 2 diaphragms
!   - NUM_NODE_PLANES: number of node planes (total number of subsctions + 1)
!   - LS: length of the subsection along the tower height (x-axis)
!   - WS: width of the truss (square cross-section)
NUM_SECTIONS=1
! NUM_SUB_SECTIONS = __NumSubsections_VAL__
NUM_SUB_SECTIONS=2
NUM_NODE_PLANES=NUM_SECTIONS*NUM_SUB_SECTIONS+1
LS=2.023/2.0
WS=2.0

! 2.2.2 Truss nodes and center nodes of each node plane
! The origin point is located in the bottom center of the truss, and x-axis is
! along the tower height.
! In the cross-section:
!       TL(-1,1)-------TR(1,1)         z|
!           |           |               |___ y
!           |           | WS
!           |           |
!       BL(-1,-1)------BR(1,-1)
!                 WS
! CAUTION: It assumes that the number of node planes are smaller than 1000.
!          NUM_SECTIONS*NUM_SUB_SECTIONS+1 < 1000
LCELL=LS*NUM_SUB_SECTIONS
*DO,I,1,NUM_NODE_PLANES,1
    ! X=(I-1)*LS
    X=(I-1)*LS-LCELL/2
    ! Truss nodes
    ! Bottom left leg
    NID=I+1000
    N,NID,X,-WS/2.0,-WS/2.0
    ! Bottom right leg
    NID=I+2000
    N,NID,X,WS/2.0,-WS/2.0
    ! Top right leg
    NID=I+3000
    N,NID,X,WS/2.0,WS/2.0
    ! Top left leg
    NID=I+4000
    N,NID,X,-WS/2.0,WS/2.0

    ! Node in the center of the cross-section, for RBE3
    NID=I+5000
    N,NID,X,0,0
*ENDDO

! 2.3 Create elements (Leg member and RBE3)
! 2.3.1 Leg members: BEAM188
TYPE,1
MAT,1
SECNUM,1
! REAL,1
*DO,I,1,NUM_NODE_PLANES-1,1
    EN,I+1000,I+1000,I+1+1000   ! Bottom left leg
    EN,I+2000,I+2000,I+1+2000   ! Bottom right leg
    EN,I+3000,I+3000,I+1+3000   ! Top right leg
    EN,I+4000,I+4000,I+1+4000   ! Top left  leg
*ENDDO

! 2.3.2 RBE3 element
!   Add a MASS21 element on the center node, or the RBE3 element will not work.
TYPE,3
REAL,4
*DO,I,1,NUM_NODE_PLANES,1
    EN,I+5000,I+5000
*ENDDO


TYPE,1
SECNUM,1

! Setting the RBE3
!   - select the nodes on the cross-section
!   - related to the center node (ref node), with ALL DOFs
*DO,I,1,NUM_NODE_PLANES,1
    ALLSEL,ALL,ALL
    XCOORD=(I-1)*LS-LCELL/2
    NSEL,S,LOC,X,XCOORD-1E-6,XCOORD+1E-6
    NSEL,U,NODE,,I+5000
    RBE3,I+5000,ALL,ALL        ! Master, DOF, Slave
*ENDDO
ALLSEL,ALL,ALL

MAX_ELEM_NUM=6000              ! Assumed
! =============================================================================
! Diaphragm members (X-Braced)
! - Following the "basic_model.inp" file
! =============================================================================
! Diaphragm members properties (Defined in "basic_model.inp")
! - Element: BEAM188
! - Section: 2
TYPE,1
MAT,2
SECNUM,2
! REAL,2
! Assume that the element numbers of each diaphragm < 100
*DO,I,1,NUM_SECTIONS+1,1
    DI=(I-1)*NUM_SUB_SECTIONS+1
    EN,MAX_ELEM_NUM+DI+100,1000+DI,2000+DI
    EN,MAX_ELEM_NUM+DI+200,2000+DI,3000+DI
    EN,MAX_ELEM_NUM+DI+300,3000+DI,4000+DI
    EN,MAX_ELEM_NUM+DI+400,4000+DI,1000+DI
    EN,MAX_ELEM_NUM+DI+500,1000+DI,3000+DI
    EN,MAX_ELEM_NUM+DI+600,2000+DI,4000+DI
*ENDDO
MAX_ELEM_NUM=MAX_ELEM_NUM+1000
! =============================================================================
! Brace members (X)
! - Following the "xdiaph.inp" file
! - For x-brace tower, the brace members are: |xxxxxx|
! =============================================================================
! Brace members properties (Defined in "basic_model.inp")
! - Element: LINK180
! - Section: real constant number 3
TYPE,2
MAT,1
REAL,3

*DO,I,1,NUM_NODE_PLANES-1,1
    EN,MAX_ELEM_NUM+I+1000,1000+I,2000+I+1
    EN,MAX_ELEM_NUM+I+2000,2000+I,3000+I+1
    EN,MAX_ELEM_NUM+I+3000,3000+I,4000+I+1
    EN,MAX_ELEM_NUM+I+4000,4000+I,1000+I+1

    EN,MAX_ELEM_NUM+I+5000,1000+I,4000+I+1
    EN,MAX_ELEM_NUM+I+6000,4000+I,3000+I+1
    EN,MAX_ELEM_NUM+I+7000,3000+I,2000+I+1
    EN,MAX_ELEM_NUM+I+8000,2000+I,1000+I+1
*ENDDO
MAX_ELEM_NUM=MAX_ELEM_NUM+1000
ALLSEL,ALL,ALL
FINISH
! =============================================================================
! FIX-FREE Boundary Conditions: Cantilever beam
! - Following the "xbrace.inp" file!
! - The Nodes on the x=0 plane will be fixed.
! =============================================================================
ALLSEL,ALL,ALL
/SOLU

FINISH
SAVE,test,DB
