finish
/clear
!采用国际单位制：N、kg、m、s

!Nodes on one leg
num_segments=3
sub_segments=1
num_leg_nodes=num_segments*sub_segments+1

/prep7
! 将黑色背景改为白色：
/RGB,INDEX,100,100,100, 0
/RGB,INDEX, 80, 80, 80,13
/RGB,INDEX, 60, 60, 60,14
/RGB,INDEX, 0, 0, 0,15
/REPLOT
! /DEV,FONT,LEGEND,MENU
/dev,font,1,bitstream*charter,medium,r,32,,,,,
! /DEV,FONT,ENTITY,MENU
/dev,font,2,bitstream*charter,medium,r,16,,,,,
! /DEV,FONT,ANNO  ,MENU
/dev,font,3,bitstream*charter,medium,r,32,,,,,


! 1. create nodes
Ll=1.0115
Ld=2.0
*do,i,1,num_leg_nodes,1
    x=(i-1)*Ll

    nid=i+1000
    n, nid, x, -Ld/2.0, -Ld/2.0

    nid=i+2000
    n, nid, x, Ld/2.0, -Ld/2.0

    nid=i+3000
    n, nid, x, Ld/2.0, Ld/2.0

    nid=i+4000
    n, nid, x, -Ld/2.0, Ld/2.0
*enddo


! 2. Define materials, elements, sections
! (1) element types
et,1,beam188
! et,1,beam4        ! legs and diaphragms
et,2,link180        ! braces

! (2) materials for all elements
uimp,1,ex,prxy,dens,2.06E11,0.31,7850
mp,alpx,1,0.000012

! (3) sections
sectype,1,beam,L    ! Leg
secdata,0.16,0.16,0.014,0.014

sectype,2,beam,L    ! Diaphragm
secdata,0.08,0.08,0.006,0.006

! (4) Real numbers
! Brace
r,1,7.412e-4

! leg
r,11, 4.2978e-3, 1.251e-5 , 1.251e-5 , , , ,
rmore, , 3.96e-7, 0, 0

! Diaphragms
r,12, 9.397e-4, 60.24e-8, 60.24e-8, , , ,
rmore, , 2.51e-8, 0, 0

! 3. Create elements
! (1) legs
type,1
mat,1
secnum,1
! real,11
offset1=1000
offset2=2000
offset3=3000
offset4=4000
*do,i,1,num_leg_nodes-1,1
    en,i+offset1,i+offset1,i+1+offset1
    en,i+offset2,i+offset2, i+1+offset2
    en,i+offset3,i+offset3, i+1+offset3
    en,i+offset4,i+offset4, i+1+offset4
*enddo

! (2) diaphragm members
type,1
mat,1
secnum, 2
! real,12
*do,i,1,num_segments+1,1
    di=(i-1)*sub_segments+1
    en, 5001+di, di+1000, di+2000
    en, 5201+di, di+2000, di+3000
    en, 5401+di, di+3000, di+4000
    en, 5601+di, di+4000, di+1000
    en, 5801+di, di+1000, di+3000
    en, 6001+di, di+2000, di+4000
    en, 6201+di, di+1000, di+3000
*enddo

! (3) brace members
type,2
mat,1
real,1
*do, i, 1, num_leg_nodes-1,1
    en,7000+i,i+1000,i+1+2000
    en,7500+i,i+2000,i+1+3000
    en,8000+i,i+3000,i+1+4000
    en,8500+i,i+4000,i+1+1000

    en,9000+i,i+1000,i+1+4000
    en,9500+i,i+4000,i+1+3000
    en,10000+i,i+3000,i+1+2000
    en,10500+i,i+2000,i+1+1000
*enddo

! *do,i,1,num_leg_nodes-1,2
!     en,7000+i,i+2000,i+1+1000
!     en,7500+i,i+3000,i+1+2000
!     en,8000+i,i+4000,i+1+3000
!     en,8500+i,i+1000,i+1+4000
! *enddo

! *do,i,2,num_leg_nodes-1,2
!     en,9000+i,i+1000,i+1+2000
!     en,9500+i,i+2000,i+1+3000
!     en,10000+i,i+3000,i+1+4000
!     en,10500+i,i+4000,i+1+1000
! *enddo


! 4. create boundary conditions
! (1) fix the bottom of legs by constraining the corresponding nodes
allsel, all, all
nsel, s, loc, x, 0
D, all, all
allsel, all, all
! ALLSEL, ALL
et, 3, mass21
r, 3, 0, 0, 0
! n, 19999, 0, 0, 0
! ! 给参考点附加一个零质量 MASS21 单元，使其成为"已使用"节点

n, 99999, (num_leg_nodes-1)*Ll, 0, 0
type, 3
real, 3
en, 99999, 99999
type, 1
real, 11

ALLSEL, ALL, ALL
NSEL, S, LOC, X, (num_leg_nodes-1)*Ll-1e-6, (num_leg_nodes-1)*Ll+1e-6
RBE3, 99999, ALL, ALL
ALLSEL, ALL, ALL

! leg1_tip = 1000 + num_leg_nodes
! leg2_tip = 2000 + num_leg_nodes
! leg3_tip = 3000 + num_leg_nodes
! leg4_tip = 4000 + num_leg_nodes

! cerig, 99999, leg1_tip, all
! cerig, 99999, leg2_tip, all
! cerig, 99999, leg3_tip, all
! cerig, 99999, leg4_tip, all
! allsel, all

! 9. 退出前处理器
FINISH
